# Rocket Motor Calculations
# Optimisation of a solid fuel motor using RNX-57V propellant
# Malcolm Snowdon
# 21 August 2009
# Operating Parameters
p_chamber := 1*10^6  # Design pressure
p_exit := 101325  # Ambient pressure
T_exit := 1016 + 273
# Burn temperature at ambient pressure
# (see 'Burn Temperature Measurement' report)
# Casing Geometry
t_casing := 0.0016  # Tube wall thickness
N_screws := 10
φ_i_casing := 0.0605  # Tube inner diameter
L_segment := 0.1  # Segment length
φ_segment := φ_i_casing - 0.002  # Propellant OD
t_segment := 0.02  # Segment wall thickness
φ_screw := 0.005  # Cap screw diameter
N_segments := 4  # # propellant segments
# Material Properties
σ_yield_casing := 250*10^6  # φ2.5" 304 stainless handrail tube purchased from Little Metals Co.
τ_screws_yield := 500*10^6  # Standard black finish cap screws
# Aerodynamic Parameters
Cd := 0.75
# Drag coeff from CFD simulation
m_dry := 6  # Allowing 1.2 kg more than 1st rocket for payload and electronics, assuming some mass will be lost from tube
φ_airframe := .087
Area := π*φ_airframe^2/4  # Compatible with Cd
ρ_air := 1.2  # Assume 25 deg. C, Patmos
# Propellant Parameters
A_RNX := 400.9  # From Nakka's charts, adjusted after static test
n_RNX := 0.641  # From Nakka's charts
k := 1.055  # Determined from Nakka's charts
R_RNX := 287  # Universal gas constant, will not be accurate with high temperatures
ρ_RNX := 1664  # Measured by volumetric displacement, agrees with literature
# Burn Surface Area
A_ends(d_burn) := N_segments*2*π/4*(φ_segment^2 - (φ_segment - 2*t_segment + 2*d_burn)^2)
A_core(d_burn) := N_segments*π*(φ_segment - 2*t_segment + 2*d_burn)*(L_segment - 2*d_burn)
A_burn(d_burn) := A_core(d_burn) + A_ends(d_burn)
N_points := 100
d_b := 0, t_segment/N_points .. t_segment  # Array of burn distance for plotting against burn surface area
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# Solve for the maximum burn area
Grad(d) := d/dd(A_burn(d)) → 8*π*(.1 - 2*d) - 8*π*(0.0185 + 2*d) + 2*π*((-0.074) - 8*d)
guess := 0  # Initail guess for the solver to work with
d_A_max := root(Grad(guess), guess)
A_burn_max := A_core(d_A_max) + A_ends(d_A_max)
# Propellant mass assuming square end faces
m_propellant := N_segments*ρ_RNX*π/4*(φ_segment^2 - (φ_segment - 2*t_segment)^2)*L_segment
# Motor Operating Conditions
# Potter and Wiggert Equation 9.3.12:
Mach_exit := ((2/(k - 1))*(p_chamber/p_exit)^((k - 1)/k) - 2/(k - 1))^(1/2)
Mach_exit = 2.14704
# Combining Potter and Wiggert Equations 9.3.12 and 9.3.13:
T_chamber := T_exit*(1 + ((k - 1)/2)*Mach_exit^2)
T_chamber = 1452.4
# Casing Stresses
σ_hoop := p_chamber*φ_i_casing/(2*t_casing)
σ_hoop = 18906250
σ_axial := p_chamber*φ_i_casing^2/((φ_i_casing + 2*t_casing)^2 - φ_i_casing^2)
σ_axial = 9209566
σ_von_Mises := (1/2*((σ_hoop - σ_axial)^2 + (σ_axial - p_chamber)^2 + (p_chamber - σ_hoop)^2))^(1/2)
Safety_factor_casing := σ_yield_casing/σ_von_Mises
σ_von_Mises = 15525084
Safety_factor_casing = 16.103
τ_screws := p_chamber*φ_i_casing^2/(φ_screw^2*N_screws)  # (Assumes pure shear)
τ_screws = 14641000
Safety_factor_screws := τ_screws_yield/τ_screws
Safety_factor_screws = 34.1507
σ_holes := p_chamber*π/4*φ_i_casing^2/(φ_screw*t_casing*N_screws)  # (Assumes pressure acts uniformly over a rectangle of dimensions φ_hole x t_wall)
σ_holes = 35934420
Safety_factor_holes := σ_yield_casing/σ_holes
Safety_factor_holes = 6.95712
# Nozzle Geometry at Design Condition
K_n := A_RNX*(p_chamber/10^6)^n_RNX
# (Ratio of burn surface area to throat area, p conv. to MPa) Note: For p_chamber = 1 MPa, n_RNX has no effect on K_n. A_RNX only was adjusted to correct chamber pressure from previous iteration
# Nakka Equation 14 - Nozzle Theory
K_n = 400.9
Expansion_ratio := ((k + 1)/2)^(1/(k - 1))*(p_exit/p_chamber)^(1/k)*((k + 1)/(k - 1)*(1 - (p_exit/p_chamber)^((k - 1)/k)))^(1/2)
Expansion_ratio = 0.383336
A_star := A_burn_max/K_n
A_star = 0.000126996
A_exit := A_star/Expansion_ratio
A_exit = 0.000331292
φ_throat := sqrt(4*A_star/π)
φ_throat = 0.012716
φ_exit := sqrt(4*A_exit/π)
φ_exit = 0.0205381
# Perfromance Metrics
# Nakka Equation 3 - Solid Rocket Motor Thrust Calculations:
Thrust := A_star*p_chamber*(2*k^2/(k - 1)*((2/(k + 1))^((k + 1)/(k - 1))*(1 - (p_exit/p_chamber)^((k - 1)/k))))^(1/2)
Thrust = 163.252
# Potter and Wigert Equation ???:
m_dot := p_chamber*A_star*(k/(R_RNX*T_chamber))^(1/2)*((k + 1)/2)^((k + 1)/(2*(1 - k)))
Burn_time := m_propellant/m_dot  # (Assumes constant burn rate throughout)
Burn_time = 13.2291
# Trajectory Approximation by Numerical Method
t_inc := 0.1
t_sim := 70
N_sim := floor(t_sim/t_inc)
tim := 0, t_inc .. t_sim
thrust(tim) :=
    Thrust if tim < Burn_time
    0 otherwise
mass(tim) :=
    m_propellant + m_dry - m_propellant/Burn_time*tim if tim < Burn_time
    m_dry otherwise
U :=
    U[0] ← 1*10^-12
    for i ∈ 1 .. N_sim - 1
        Fd[i] ← 1/2*Cd*ρ_air*Area*U[i - 1]^2*U[i - 1]/|U[i - 1]|
        F_total[i] ← thrust(i*t_inc) - Fd[i] - 9.81*mass(i*t_inc)
        U[i] ← U[i - 1] + F_total[i]/mass(i*t_inc)*t_inc
    return U
h :=
    h[0] ← 0
    for i ∈ 0 .. N_sim - 1
        h[i + 1] ← h[i] + U[i]*t_inc
    return h
h_max := max(h)
h_max = 1778.05
U_max := max(U)
U_max = 145.954
# Results Summary
m_propellant = 1.6101
Mach_exit = 2.14704
T_chamber = 1452.4
Safety_factor_casing = 16.103
Safety_factor_screws = 34.1507
Safety_factor_holes = 6.95712
φ_throat = 0.012716
φ_exit = 0.0205381
Thrust = 163.252
Burn_time = 13.2291
h_max = 1778.05
U_max = 145.954
